<?xml version="1.0"?>
<!-- GENERATED by uavlab 0.1.0. Source: APC Propellers performance file PER3_18x8E.dat (manufacturer-computed data).
     Axis 1 (rows) = advance ratio J; axis 2 (columns) = propeller speed in kRPM,
     carried through JSBSim's blade-angle property (manual pitch mode).
     Rows with J > 0.64 are linear extrapolations (windmilling region). -->
<propeller name="lab_propeller">
  <ixx unit="SLUG*FT2"> 0.001033 </ixx>
  <diameter unit="IN"> 18.0 </diameter>
  <numblades> 2 </numblades>
  <minpitch> 1.0 </minpitch>
  <maxpitch> 12.0 </maxpitch>
  <ct_factor> 1.0 </ct_factor>
  <cp_factor> 1.0 </cp_factor>
  <table name="C_THRUST" type="internal">
    <tableData>
                  1.0      2.0      3.0      4.0      5.0      6.0      7.0      8.0      9.0     10.0     11.0     12.0
      0.000   0.08450  0.08470  0.08470  0.08560  0.08700  0.08860  0.09030  0.09140  0.09300  0.09440  0.09530  0.09420
      0.020   0.08339  0.08359  0.08349  0.08442  0.08574  0.08735  0.08902  0.09013  0.09174  0.09413  0.09539  0.09411
      0.040   0.08214  0.08227  0.08230  0.08307  0.08441  0.08590  0.08761  0.08869  0.09039  0.09328  0.09540  0.09402
      0.060   0.08059  0.08091  0.08095  0.08171  0.08293  0.08439  0.08601  0.08716  0.08886  0.09195  0.09497  0.09400
      0.080   0.07908  0.07942  0.07943  0.08022  0.08135  0.08277  0.08436  0.08549  0.08719  0.09036  0.09417  0.09375
      0.100   0.07763  0.07788  0.07785  0.07862  0.07973  0.08109  0.08260  0.08371  0.08547  0.08857  0.09303  0.09313
      0.120   0.07611  0.07621  0.07625  0.07689  0.07803  0.07927  0.08071  0.08185  0.08367  0.08662  0.09172  0.09209
      0.140   0.07430  0.07438  0.07455  0.07507  0.07613  0.07732  0.07873  0.07990  0.08170  0.08457  0.09023  0.09082
      0.160   0.07213  0.07254  0.07264  0.07320  0.07408  0.07531  0.07666  0.07785  0.07960  0.08243  0.08846  0.08950
      0.180   0.07031  0.07051  0.07057  0.07116  0.07207  0.07316  0.07444  0.07564  0.07740  0.08009  0.08657  0.08801
      0.200   0.06834  0.06854  0.06845  0.06898  0.06990  0.07092  0.07213  0.07334  0.07498  0.07769  0.08441  0.08636
      0.220   0.06621  0.06620  0.06640  0.06680  0.06757  0.06850  0.06965  0.07089  0.07254  0.07517  0.08203  0.08445
      0.240   0.06348  0.06398  0.06400  0.06444  0.06515  0.06601  0.06708  0.06835  0.07001  0.07242  0.07947  0.08232
      0.260   0.06108  0.06143  0.06150  0.06191  0.06253  0.06334  0.06444  0.06565  0.06733  0.06972  0.07665  0.07983
      0.280   0.05869  0.05892  0.05902  0.05929  0.05985  0.06067  0.06164  0.06285  0.06448  0.06676  0.07360  0.07674
      0.300   0.05614  0.05611  0.05629  0.05653  0.05709  0.05788  0.05874  0.05991  0.06148  0.06371  0.07024  0.07329
      0.320   0.05310  0.05331  0.05341  0.05365  0.05426  0.05496  0.05575  0.05691  0.05836  0.06056  0.06665  0.06965
      0.340   0.05004  0.05047  0.05049  0.05075  0.05132  0.05200  0.05273  0.05387  0.05520  0.05729  0.06291  0.06592
      0.360   0.04728  0.04748  0.04758  0.04780  0.04828  0.04899  0.04968  0.05074  0.05201  0.05397  0.05903  0.06216
      0.380   0.04446  0.04457  0.04470  0.04483  0.04523  0.04584  0.04654  0.04754  0.04873  0.05060  0.05510  0.05843
      0.400   0.04165  0.04140  0.04161  0.04190  0.04216  0.04269  0.04333  0.04425  0.04540  0.04710  0.05118  0.05493
      0.420   0.03875  0.03841  0.03835  0.03872  0.03902  0.03936  0.04014  0.04088  0.04205  0.04359  0.04733  0.05120
      0.440   0.03480  0.03500  0.03510  0.03553  0.03579  0.03616  0.03674  0.03743  0.03853  0.03991  0.04331  0.04738
      0.460   0.03173  0.03193  0.03203  0.03218  0.03230  0.03273  0.03326  0.03397  0.03491  0.03632  0.03919  0.04331
      0.480   0.02859  0.02842  0.02866  0.02882  0.02896  0.02934  0.02988  0.03036  0.03130  0.03257  0.03509  0.03907
      0.500   0.02544  0.02511  0.02515  0.02546  0.02557  0.02585  0.02629  0.02672  0.02755  0.02873  0.03090  0.03453
      0.520   0.02173  0.02187  0.02181  0.02198  0.02210  0.02230  0.02262  0.02309  0.02376  0.02481  0.02663  0.02984
      0.540   0.01801  0.01838  0.01838  0.01843  0.01856  0.01865  0.01895  0.01935  0.01997  0.02081  0.02228  0.02511
      0.560   0.01468  0.01475  0.01471  0.01485  0.01488  0.01497  0.01526  0.01559  0.01605  0.01676  0.01790  0.02028
      0.580   0.01134  0.01121  0.01096  0.01118  0.01114  0.01129  0.01150  0.01182  0.01201  0.01262  0.01345  0.01529
      0.600   0.00783  0.00741  0.00724  0.00746  0.00744  0.00751  0.00762  0.00789  0.00801  0.00832  0.00886  0.01027
      0.620   0.00340  0.00389  0.00371  0.00372  0.00367  0.00364  0.00370  0.00389  0.00394  0.00410  0.00421  0.00516
      0.640  -0.00018 -0.00002 -0.00006 -0.00007 -0.00008 -0.00012 -0.00013 -0.00009 -0.00016 -0.00014 -0.00036 -0.00003
      0.680  -0.00786 -0.00752 -0.00741 -0.00758 -0.00756 -0.00772 -0.00788 -0.00803 -0.00828 -0.00864 -0.00957 -0.01027
      0.720  -0.01554 -0.01501 -0.01477 -0.01509 -0.01504 -0.01532 -0.01563 -0.01598 -0.01640 -0.01714 -0.01878 -0.02050
      0.760  -0.02323 -0.02251 -0.02212 -0.02260 -0.02253 -0.02293 -0.02338 -0.02392 -0.02452 -0.02564 -0.02798 -0.03074
      0.800  -0.03091 -0.03000 -0.02948 -0.03011 -0.03001 -0.03053 -0.03113 -0.03187 -0.03264 -0.03414 -0.03719 -0.04098
      0.900  -0.05012 -0.04874 -0.04786 -0.04888 -0.04871 -0.04953 -0.05050 -0.05173 -0.05295 -0.05539 -0.06021 -0.06657
    </tableData>
  </table>
  <table name="C_POWER" type="internal">
    <tableData>
                  1.0      2.0      3.0      4.0      5.0      6.0      7.0      8.0      9.0     10.0     11.0     12.0
      0.000   0.02970  0.02980  0.02840  0.03050  0.03470  0.03860  0.04190  0.03940  0.03720  0.03360  0.04160  0.04440
      0.020   0.02987  0.02997  0.02868  0.03041  0.03407  0.03753  0.04016  0.03785  0.03630  0.03405  0.04178  0.04476
      0.040   0.02997  0.03008  0.02886  0.03032  0.03352  0.03642  0.03871  0.03672  0.03540  0.03426  0.04196  0.04521
      0.060   0.03015  0.03024  0.02904  0.03023  0.03296  0.03549  0.03747  0.03577  0.03469  0.03430  0.04200  0.04566
      0.080   0.03027  0.03036  0.02916  0.03014  0.03242  0.03463  0.03634  0.03499  0.03418  0.03424  0.04187  0.04599
      0.100   0.03030  0.03040  0.02926  0.03005  0.03193  0.03382  0.03524  0.03426  0.03378  0.03409  0.04158  0.04620
      0.120   0.03034  0.03044  0.02934  0.02991  0.03148  0.03305  0.03425  0.03358  0.03338  0.03391  0.04117  0.04505
      0.140   0.03040  0.03050  0.02940  0.02973  0.03102  0.03232  0.03335  0.03295  0.03293  0.03369  0.04069  0.04367
      0.160   0.03037  0.03048  0.02937  0.02955  0.03053  0.03160  0.03246  0.03231  0.03248  0.03342  0.04014  0.04438
      0.180   0.03028  0.03038  0.02928  0.02935  0.03001  0.03086  0.03164  0.03168  0.03202  0.03312  0.03959  0.04500
      0.200   0.03020  0.03030  0.02918  0.02906  0.02956  0.03015  0.03085  0.03106  0.03156  0.03266  0.03906  0.04545
      0.220   0.03011  0.03020  0.02901  0.02870  0.02911  0.02950  0.03012  0.03042  0.03111  0.03221  0.03851  0.04472
      0.240   0.02991  0.03003  0.02873  0.02834  0.02858  0.02888  0.02929  0.02979  0.03048  0.03175  0.03796  0.04383
      0.260   0.02957  0.02968  0.02837  0.02789  0.02801  0.02823  0.02857  0.02915  0.02993  0.03114  0.03726  0.04285
      0.280   0.02923  0.02933  0.02796  0.02744  0.02740  0.02753  0.02784  0.02844  0.02925  0.03050  0.03639  0.04164
      0.300   0.02883  0.02889  0.02745  0.02685  0.02677  0.02688  0.02711  0.02772  0.02852  0.02975  0.03529  0.04025
      0.320   0.02829  0.02839  0.02684  0.02622  0.02609  0.02619  0.02637  0.02694  0.02774  0.02894  0.03405  0.03880
      0.340   0.02766  0.02781  0.02615  0.02549  0.02535  0.02542  0.02561  0.02612  0.02687  0.02804  0.03270  0.03730
      0.360   0.02699  0.02709  0.02539  0.02467  0.02454  0.02457  0.02474  0.02524  0.02594  0.02700  0.03125  0.03582
      0.380   0.02621  0.02628  0.02459  0.02382  0.02362  0.02361  0.02373  0.02421  0.02492  0.02592  0.02976  0.03449
      0.400   0.02535  0.02531  0.02365  0.02287  0.02263  0.02253  0.02269  0.02311  0.02381  0.02479  0.02820  0.03322
      0.420   0.02441  0.02436  0.02262  0.02187  0.02163  0.02141  0.02154  0.02192  0.02255  0.02352  0.02659  0.03176
      0.440   0.02300  0.02300  0.02150  0.02078  0.02047  0.02026  0.02035  0.02065  0.02128  0.02204  0.02494  0.03031
      0.460   0.02172  0.02181  0.02031  0.01952  0.01915  0.01896  0.01898  0.01929  0.01981  0.02061  0.02303  0.02860
      0.480   0.02030  0.02023  0.01887  0.01817  0.01773  0.01755  0.01757  0.01784  0.01828  0.01902  0.02115  0.02672
      0.500   0.01874  0.01860  0.01731  0.01668  0.01629  0.01601  0.01605  0.01625  0.01668  0.01730  0.01910  0.02468
      0.520   0.01681  0.01693  0.01576  0.01507  0.01474  0.01442  0.01437  0.01455  0.01500  0.01552  0.01700  0.02248
      0.540   0.01483  0.01507  0.01407  0.01339  0.01308  0.01273  0.01263  0.01283  0.01319  0.01360  0.01495  0.02020
      0.560   0.01300  0.01306  0.01217  0.01162  0.01125  0.01091  0.01083  0.01100  0.01119  0.01156  0.01291  0.01784
      0.580   0.01108  0.01101  0.01015  0.00975  0.00927  0.00901  0.00892  0.00902  0.00907  0.00945  0.01081  0.01530
      0.600   0.00898  0.00874  0.00806  0.00773  0.00729  0.00704  0.00688  0.00693  0.00697  0.00725  0.00857  0.01269
      0.620   0.00641  0.00669  0.00610  0.00567  0.00535  0.00504  0.00483  0.00488  0.00486  0.00516  0.00626  0.01020
      0.640   0.00436  0.00452  0.00411  0.00378  0.00349  0.00325  0.00302  0.00303  0.00295  0.00328  0.00419  0.00799
      0.680  -0.00012  0.00021  0.00009 -0.00019 -0.00035 -0.00057 -0.00088 -0.00094 -0.00111 -0.00078 -0.00021  0.00318
      0.720  -0.00459 -0.00410 -0.00393 -0.00415 -0.00419 -0.00439 -0.00477 -0.00490 -0.00518 -0.00485 -0.00460 -0.00164
      0.760  -0.00906 -0.00841 -0.00795 -0.00811 -0.00803 -0.00821 -0.00867 -0.00886 -0.00924 -0.00892 -0.00900 -0.00646
      0.800  -0.01354 -0.01272 -0.01197 -0.01208 -0.01187 -0.01202 -0.01257 -0.01283 -0.01330 -0.01299 -0.01339 -0.01128
      0.900  -0.02472 -0.02350 -0.02201 -0.02199 -0.02147 -0.02157 -0.02232 -0.02274 -0.02345 -0.02316 -0.02437 -0.02332
    </tableData>
  </table>
</propeller>
